# Lammps script to read in mBuild topologies and perform energy minimization
# Initialization
units           real
boundary        p p p
atom_style      full

# Assume ff info is included in data file
pair_style      lj/cut/coul/cut 10.0 #no charges
bond_style  none
angle_style none
dihedral_style  none
read_data methane.lammps

pair_modify shift yes  #TODO: Look to make sure this shift is okay

neighbor        2.5 bin #TODO: I think this is the skin cutoff, double check

timestep 0.1
thermo 2000
thermo_style custom step temp press pe epair emol ke etotal
# ________________________________________________________________________________________

# Minimize energy
dump traj1 all xtc 1000 min_sur.xtc # Only write out to make sure things work okay, then remove that
minimize 1e-4 1e-4 1000 1000
fix integrator all nve/limit 0.1
run 10000
unfix integrator
minimize 1e-4 1e-4 1000 1000
fix integrator all nve
run 10000
unfix integrator
minimize 1e-4 1e-4 1000 1000
fix integrator all nvt temp 100.0 100.0 10000.0
run 50000
unfix integrator
write_restart minimized.restart #remove once working
#use a differetent tdamp to control the temp
undump traj1
# ________________________________________________________________________________________

# Equilibrate box
dump traj2 all xtc 10000 eq.xtc # Only write out to make sure things work okay, then remove that
timestep 1.0
minimize 1e-4 1e-4 1000 1000
fix integrator all nvt temp 100.0 100.0 100.0
run 50000
unfix integrator
write_restart equilibrated.restart #remove once working
undump traj2
# ________________________________________________________________________________________


# Production
dump traj3 all xtc 10000 prod.xtc # Only write out to make sure things work okay, then remove that
timestep 1.0
minimize 1e-4 1e-4 1000 1000
fix integrator all nvt temp 100.0 100.0 100.0
run 500000
unfix integrator
write_restart production.restart #remove once working
undump traj3
# ________________________________________________________________________________________
